# Задание №3
A := [1.53, 1.61, 1.43; 2.35, 2.31, 2.07; 3.83, 3.73, 3.45]
B := [-5.13; -3.69; -5.98]
X := A^-1*B = [24.6968; -19.2532; -8.33452]
lsolve(A, B) = [24.6968; -19.2532; -8.33452]
solve block
    # guess values
    x := 0
    y := 0
    z := 0
    # constraints
    1.53*x + 1.61*y + 1.43*z == -5.13
    2.35*x + 2.31*y + 2.07*z == -3.69
    3.83*x + 3.73*y + 3.45*z == -5.98
    # solver
    find(x, y, z) = [24.6968; -19.2532; -8.33452]
end solve block
# Задание №1
f(x) := x^4 - 4*x - 2  # Исходная функция
# [plot: f(x) vs x]
# График функции на промежутке [-10,10]
# Нахождение корней уравнения
x1 := root(f(x), x, -10, 1) = -0.486047
x2 := root(f(x), x, 1, 10) = 1.72775
f(x) solve → [1.7277535004; -0.486047418384; -0.620853041009 + 1.4128501775i; -0.620853041009 - 1.4128501775i]
v := f(x) coeffs → [-2; -4; 0; 0; 1]
polyroots(v) = [-0.620853 - 1.41285i; -0.620853 + 1.41285i; -0.486047; 1.72775]
# [plot: f(x) vs x]
# График функции для первого корня
# [plot: f(x) vs x]
# График функции для второго корня
# Задание 4
UU :=
    res ← 1
    for i ∈ 2 .. 20
        res ← lcm(res, i)
    return res
UU = 232792560
