n := 10
i := 0 .. 2*n
X[i] := 2*π*i*1/(2*n + 1)
# Кусочно-линейная интерполяция
scale := 100
j := 0 .. scale
t[j] := min(X) + j*(max(X) - min(X))/scale
X = [0; 0.299199; 0.598399; 0.897598; 1.1968; 1.496; 1.7952; 2.0944; 2.39359; 2.69279; 2.99199; 3.29119; 3.59039; 3.88959; 4.18879; 4.48799; 4.78719; 5.08639; 5.38559; 5.68479; 5.98399]
Y := [1.0; 1.05; 90.6; 520.4; 1714.7; 2915.0; 2439.2; 1020.6; 230.7; 32.17; 3.29; 0.3; 0.03; 0.004; 0.001; 0.0003; 0.0006; 0.002; 0.01; 0.09; 0.9]
fintl(t) := linterp(X, Y, t)
# Интерполяция кубическим сплайном
S := cspline(X, Y)
fints(t) := interp(S, X, Y, t)
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# Графики сравнения интерполяций
